# Теоретична оцінка завадостійкості
Pb_PSK(h2) := 1 - pnorm(sqrt(2*h2), 0, 1)  # Фазова маніпуляція
Pb_FSK(h2) := 1 - pnorm(sqrt(h2), 0, 1)  # Частотна маніпуляція
h2 := 0, 0.01 .. 60
Pb_ASK(h2) := 1 - pnorm(sqrt(h2/2), 0, 1)  # Амплітудна маніпуляція
dB(h2) := 10*log(h2)  # Перехід до дБ
log(60) = 1.77815
log(1/10) = -1
log(0.01) = -2
h21[i] := 10^(i/10)  # error: Эта переменная не определена.
dB(0.1) = -10
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x := 0, 0.1 .. 100
h3(x) := 10^(x/10)
h3(-1.60) = 0.691831
h3(20) = 100
h3(-0.1) = 0.977237
h3(10) = 10
h3(20) = 100
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i := 0 .. 130
h2[i] := 10^-1*10^(i/10)  # Таблиця значень  h^(2 ,) якщо i  в дБ
f_0 := 1  # Центральна частота сигналу s1
f_1 := 4/3  # Центральна частота сигналу s2 при ЧМн
A := 1  # Амплітуда синусоїди
T := 1/f_1*4 = 3  # Символьний інтервал
f_d := f_1*6 = 8  # Частота дискретизації
n := T*f_d = 24  # Кількість відліків на символьному інтервалі
Sn(h2) := A/2*sqrt(n/h2)  # Середньоквадратичне відхилення завади
Nd := 10^5  # Кількість дослідів
i := 0 .. 15
h_2[i] := 10^-1*10^(2*i/10)
j := 0 .. n - 1
t[j] := j/f_d
x0[j] := A*sin(2*π*f_0*t[j])
x1[j] := A*sin(2*π*f_1*t[j])
x00[j] := 0
y[j] := A*cos(2*π*f_1*t[j])
z[j] := A*sin(2*π*f_1*t[j])
S1P := x0
S2P := -x0  # Сигнали системи з фазовою маніпуляцією
s3 := y
z3 := z
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z[15] = 2.38866e-15
z[16] = -0.866025
z[17] = -0.866025
z[18] = -7.34764e-16
d := 1/f_d
d = 0.125
# f_d=
S1F := x0
S2F := x1  # Сигнали системи з частотною (зсунутої по фазі фазовою) маніпуляцією
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S1A := x0
S2A := x00  # Сигнали системи з пасивною амплітудною (фазовою) маніпуляцією
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x := S1P
n5 := rnorm(n, 0, Sn(5))
z := x*(x + 1*n5)
y := x + 2*n5
z = 12.6481
ModelPSK(N, h2_) :=
    Er ← 0
    for i ∈ 0 .. N - 1
        b ← rbinom(1, 1, 0.5)[0]
        x ← S1P if b > 0
        x ← S2P otherwise
        nt ← rnorm(n, 0, Sn(h2_))
        Er ← Er + 1 if (x + nt)*x < 0
    Er/N
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Pe_PSK[i] := ModelPSK(Nd, h_2[i])
h_2[i] = [0.1; 0.158489; 0.251189; 0.398107; 0.630957; 1; 1.58489; 2.51189; 3.98107; 6.30957; 10; 15.8489; 25.1189; 39.8107; 63.0957; 100]
ModelFSK(N, h2_) :=
    Er ← 0
    for i ∈ 0 .. N - 1
        b ← rbinom(1, 1, 0.5)[0]
        if b > 0
            x ← S1F
            x2 ← S2F
        otherwise
            x ← S2F
            x2 ← S1F
        nt ← rnorm(n, 0, Sn(h2_))
        Er ← Er + 1 if (x + nt)*x < (x + nt)*x2
    Er/N
Pe_FSK[i] := ModelFSK(Nd, h_2[i])
ModelASK(N, h2_) :=
    Er ← 0
    for i ∈ 0 .. N - 1
        b ← rbinom(1, 1, 0.5)[0]
        if b > 0
            x ← S1F
            x2 ← S2F
        otherwise
            x ← S2F
            x2 ← S1F
        nt ← rnorm(n, 0, Sn(h2_))
        Er ← Er + 1 if (x + nt)*S1F < A^2*n/4 and b == 1 or (x + nt)*S1F > A^2*n/4 and b == 0
    Er/N
Pe_ASK[i] := ModelASK(Nd, h_2[i])
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